*Heading
** Job name: Job-new1 Model name: CL1_3CT1_2_Torsion-linear
** Generated by: Abaqus/CAE 2024
*Preprint, echo=NO, model=NO, history=NO, contact=NO
**
** PARTS
**
*Part, name=PART-1
*Node
      1,  -133.333328,        -100.,        -200.
      2,  -133.333328,        -100.,  -203.333328
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*Element, type=S4R
    1,   182,   185,   186,   181
    2,   181,   186,   177,   178
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*Elset, elset=HMPROP_5MM
     1,     2,     3,     4,     5,     6
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*Elset, elset=HMPROP_HATCH_L
 14115, 14116, 14117, 14118, 14119, 14120
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*Elset, elset=HMPROP_WEB, generate
  2001,  14114,      1
** Section: Section-1-HMPROP_5MM
*Shell Section, elset=HMPROP_5MM, material=STEEL
2.5, 5
** Section: Section-2-HMPROP_WEB
*Shell Section, elset=HMPROP_WEB, material=STEEL
2.5, 5
** Section: Section-3-HMPROP_HATCH_L
*Shell Section, elset=HMPROP_HATCH_L, material=STEEL
3.6, 5
*End Part
**
**
** ASSEMBLY
**
*Assembly, name=Assembly
**
*Instance, name=PART-1-1, part=PART-1
*End Instance
**
*Node
      1,           0.,           0.,   333.333344
*Node
      2,           0.,           0.,  -333.333344
*Elset, elset=COMP1, instance=PART-1-1
     1,     2,     3,     4,     5,     6
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*Elset, elset=COMP2, instance=PART-1-1
   801,   802,   803,   804,   805,   806
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*Elset, elset=COMP3, instance=PART-1-1
   881,   882,   883,   884,   885,   886
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*Elset, elset=COMP4, instance=PART-1-1
   961,   962,   963,   964,   965,   966
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*Elset, elset=COMP5, instance=PART-1-1
  1041,  1042,  1043,  1044,  1045,  1046
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*Elset, elset=COMP6, instance=PART-1-1
  1841,  1842,  1843,  1844,  1845,  1846
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*Nset, nset=END1, instance=PART-1-1
  1250,  1251,  1252,  1253,  1254,  1255
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*Nset, nset=END2, instance=PART-1-1
    41,    42,    43,    44,    45,    46
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*Nset, nset=_PickedSet33, internal
 1,
*Nset, nset=_PickedSet34, internal
 2,
*Nset, nset=_PickedSet35, internal
 1,
*Nset, nset=_PickedSet36, internal
 2,
*Surface, type=NODE, name=END1_CNS_, internal
END1, 1.
*Surface, type=NODE, name=END2_CNS_, internal
END2, 1.
** Constraint: Constraint-1
*Coupling, constraint name=Constraint-1, ref node=_PickedSet35, surface=END1_CNS_
*Kinematic
** Constraint: Constraint-2
*Coupling, constraint name=Constraint-2, ref node=_PickedSet36, surface=END2_CNS_
*Kinematic
*End Assembly
*Amplitude, name=A_1s, definition=SMOOTH STEP
             0.,              0.,              1.,              1.
**
** MATERIALS
**
** HMNAME MATS          1 steel     4
*Material, name=STEEL
*Density
 7.85e-09,
*Elastic
206000., 0.3
*Plastic
345.,0.
** ----------------------------------------------------------------
**
** STEP: Step-1
**
*Step, name=Step-1, nlgeom=NO
*Static
1., 1., 1e-05, 1.
**
** BOUNDARY CONDITIONS
**
** Name: BC-1 Type: Displacement/Rotation
*Boundary
_PickedSet33, 1, 1
_PickedSet33, 2, 2
_PickedSet33, 3, 3
_PickedSet33, 4, 4
_PickedSet33, 5, 5
_PickedSet33, 6, 6, 0.0012
** Name: BC-2 Type: Displacement/Rotation
*Boundary
_PickedSet34, 1, 1
_PickedSet34, 2, 2
_PickedSet34, 3, 3
_PickedSet34, 4, 4
_PickedSet34, 5, 5
_PickedSet34, 6, 6, -0.0012
**
** OUTPUT REQUESTS
**
*Restart, write, number interval=1, time marks=NO
**
** FIELD OUTPUT: F-Output-1
**
*Output, field, variable=PRESELECT, number interval=50, time marks=NO
**
** HISTORY OUTPUT: H-Output-1
**
*Output, history, variable=PRESELECT, number interval=200, time marks=NO
*End Step
