*Heading
 Conformal common-node FEM counterpart of kuangjia_zhi.dwg
** Job name: kuangjia_zhi_same_geometry_fem Model name: KUANGJIA_ZHI_FEM
** Generated by: Abaqus/CAE 2024
*Preprint, echo=NO, model=NO, history=NO, contact=NO
**
** PARTS
**
*Part, name=KUANGJIA_ZHI_COMMON_NODE
*Node
      1,   644.799988,       -1200.,       23250.
      2,   244.800003,       -1200.,       23250.
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*Element, type=S4R
  1,    1,  146, 2967,  207
  2,  146,  147, 2968, 2967
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*Element, type=S3
14796, 15681, 15682, 15684
14797, 16013, 16011, 16067
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*Elset, elset=ELEMENTS_T_7
 1079, 1080, 1081, 1082, 1083, 1084
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*Elset, elset=ELEMENTS_T_8
  4027,  4028,  4029,  4030,  4031,  4032
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*Elset, elset=ELEMENTS_T_12
  1387,  1388,  1389,  1390,  1391,  1392
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*Elset, elset=ELEMENTS_T_13P2174
 1035, 1036, 1037, 1038, 1039, 1040
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*Elset, elset=ELEMENTS_T_14
   485,   486,   487,   488,   489,   490
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*Elset, elset=ELEMENTS_T_15P3913
 1013, 1014, 1015, 1016, 1017, 1018
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*Elset, elset=ELEMENTS_T_16
     1,     2,     3,     4,     5,     6
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*Nset, nset=FIXED_END_NODES
     1,     2,     3,     4,    76,    77
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** Section: SHELL_T_16
*Shell Section, elset=ELEMENTS_T_16, material=STEEL
16., 5
** Section: SHELL_T_14
*Shell Section, elset=ELEMENTS_T_14, material=STEEL
14., 5
** Section: SHELL_T_15P3913
*Shell Section, elset=ELEMENTS_T_15P3913, material=STEEL
15.3913, 5
** Section: SHELL_T_13P2174
*Shell Section, elset=ELEMENTS_T_13P2174, material=STEEL
13.2174, 5
** Section: SHELL_T_7
*Shell Section, elset=ELEMENTS_T_7, material=STEEL
7., 5
** Section: SHELL_T_12
*Shell Section, elset=ELEMENTS_T_12, material=STEEL
12., 5
** Section: SHELL_T_8
*Shell Section, elset=ELEMENTS_T_8, material=STEEL
8., 5
*End Part
**
**
** ASSEMBLY
**
*Assembly, name=Assembly
**
*Instance, name=KUANGJIA_ZHI-1, part=KUANGJIA_ZHI_COMMON_NODE
*End Instance
**
*Elset, elset=_PRESSURE_END_SPOS, internal, instance=KUANGJIA_ZHI-1
 10055, 10056, 10057, 10058, 10059, 10060
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*Elset, elset=_PRESSURE_END_SNEG, internal, instance=KUANGJIA_ZHI-1
 10121, 10122, 10123, 10124, 10125, 10126
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*Surface, type=ELEMENT, name=PRESSURE_END
_PRESSURE_END_SPOS, SPOS
_PRESSURE_END_SNEG, SNEG
*End Assembly
**
** MATERIALS
**
*Material, name=STEEL
*Elastic
210000., 0.3
**
** BOUNDARY CONDITIONS
**
** Name: FIXED_END_TRANSLATIONS Type: Displacement/Rotation
*Boundary
KUANGJIA_ZHI-1.FIXED_END_NODES, 1, 1
KUANGJIA_ZHI-1.FIXED_END_NODES, 2, 2
KUANGJIA_ZHI-1.FIXED_END_NODES, 3, 3
** ----------------------------------------------------------------
**
** STEP: LOAD
**
*Step, name=LOAD, nlgeom=NO
*Static
0.1, 1., 1e-08, 0.1
**
** LOADS
**
** Name: PRESSURE_0P06_MPA   Type: Pressure
*Dsload
PRESSURE_END, P, 0.06
**
** OUTPUT REQUESTS
**
*Restart, write, frequency=0
**
** FIELD OUTPUT: F-Output-1
**
*Output, field
*Node Output
RF, U
*Element Output, directions=YES
MISES, S
**
** HISTORY OUTPUT: ENERGY_HISTORY
**
*Output, history
*Energy Output
ALLAE, ALLIE, ALLSE, ALLWK
**
** HISTORY OUTPUT: H-Output-1
**
*Output, history, variable=PRESELECT
*End Step
